*HEADING
** Use of this file must comply with the Terms and Conditions stated by Structrual FEA, LLC (www.structuralfea.com)
*Part,name=a
***********
***NODES***
***********
*NODE, NSET=ALL
1, 0.00000E+00, 0.00000E+00, 0.00000E+00
2, 5.00000E-01, 0.00000E+00, 0.00000E+00
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***************
***ELEMENTS***
***************
*ELEMENT,  TYPE=S8R,  ELSET=PLATE
1, 1, 3, 2003, 2001, 2, 1003, 2002, 1001
2, 3, 5, 2005, 2003, 4, 1005, 2004, 1003
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*end part
************************
***DEFINE ORIENTATION(S)***
************************
*ORIENTATION, SYSTEM=R, NAME=GLOBAL
** Weird because it's 2 nodes to define a coordinate system.
** The trick is that it's defining the material coordinate system,
** so you only need 2 nodes.
1.,          0.,          0.,          0.,          1.,          0.
********************************************
***ISOTROPIC MATERIAL (OPTION A)***
********************************************
*MATERIAL, NAME=A
*ELASTIC, TYPE=ISO
1.00000E+07, 3.00000E-01
*SHELL SECTION,  ELSET=PLATE,  MATERIAL=A, ORIENTATION=GLOBAL
5.00000E-02
**
********************************************************************
***FIXED NODES AT BOTTOM LEFT CORNER TO PREVENT RIGID BODY MOTION***
********************************************************************
*BOUNDARY
1, 1
1, 2
10001, 1
*****************************************
***EDGE BOUNDARY CONDITIONS (SUPPORTS)***
*****************************************
***RIGHT SIDE
21, 3
1021, 3
2021, 3
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20021, 3
***TOP SIDE
20001, 3
20002, 3
20003, 3
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20021, 3
***LEFT SIDE
1, 3
1001, 3
2001, 3
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20001, 3
***BOTTOM SIDE
1, 3
2, 3
3, 3
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21, 3
*******************************************************
*STEP
*BUCKLE
3
*******************************************************
**
*CLOAD
*****************************************
***RUNNING LOADS - TENSION/COMPRESSION***
*****************************************
***NX (RIGHT)
21, 1, -1.6667E+01
1021, 1, -6.6667E+01
2021, 1, -3.3333E+01
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20021, 1, -1.6667E+01
***NY (TOP)
20001, 2, 0.0000E+00
20002, 2, 0.0000E+00
20003, 2, 0.0000E+00
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20021, 2, 0.0000E+00
***NX (LEFT)
1, 1, 1.6667E+01
1001, 1, 6.6667E+01
2001, 1, 3.3333E+01
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20001, 1, 1.6667E+01
***NY (BOTTOM)
1, 2, 0.0000E+00
2, 2, 0.0000E+00
3, 2, 0.0000E+00
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21, 2, 0.0000E+00
***************************
***RUNNING LOADS - SHEAR***
***************************
***NXY (RIGHT)
21, 2, 0.0000E+00
1021, 2, 0.0000E+00
2021, 2, 0.0000E+00
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20021, 2, 0.0000E+00
***NXY (TOP)
20001, 1, 0.0000E+00
20002, 1, 0.0000E+00
20003, 1, 0.0000E+00
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20021, 1, 0.0000E+00
***NXY (LEFT)
1, 2, 0.0000E+00
1001, 2, 0.0000E+00
2001, 2, 0.0000E+00
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20001, 2, 0.0000E+00
***NXY (BOTTOM)
1, 1, 0.0000E+00
2, 1, 0.0000E+00
3, 1, 0.0000E+00
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21, 1, 0.0000E+00
***************************
*****IN-PLANE MOMENTS******
***************************
***  NOTE THAT THESE ARE ADDED TO NX AND NY (IF THEY EXIST) ******
***  THEY DO NOT NEED TO COMINBED (THEY ARE SEPARATED FOR EASE OF INSPECTION) ******
************************************************************************************
***NXM (RIGHT)
***NXM (LEFT)
***NYM (TOP)
***NYM (BOTTOM)
*NODE PRINT, NSET = ALL
U
*NODE FILE
U
*EL FILE
S, E
*END STEP
