**
** ABAQUS Input Deck Generated by HyperMesh Version  : 2017.2.3-HWDesktop
** Generated using HyperMesh-Abaqus Template Version : 2017.2.0.16-mpatilHwaSa2017.2.3BW-dev23
**
**   Template:  ABAQUS/STANDARD 3D
**
*NODE
         2,  6414.0         ,  0.0            ,  -678.0
         3,  6476.2681739006,  1411.2198680208,  308.49055531554
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*SYSTEM
6414.0    , 0.0       , -678.0    , 6414.03642, 0.81906834, -677.42746
6414.05199, -0.573696 , -677.18258
*NODE, SYSTEM=C
       241,  1724.0602494441,  54.991639723866,  -0.280338873236
*ELEMENT,TYPE=B31H,ELSET=inside
         1,         3,         4,         2
         2,         4,         5,         2
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*ELEMENT,TYPE=B31H,ELSET=outside
       239,       242,       243,         2
       240,       243,       244,         2
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*ELEMENT,TYPE=B31H,ELSET=top_tip
       589,       241,       592,         2
       590,       592,       593,         2
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*ELSET, ELSET=HMprop_beam
         1,         2,         3,         4,         5,         6
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*TRANSFORM, TYPE=C, NSET=HM_auto_transform_3
6414.0    , 0.0       , -678.0    ,  6513.79832,  -4.661E-06,  -684.34787
*NSET, NSET=outside_load
       242,       243,       244,       245,       246,       247
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*ELSET, ELSET=outside_elems
       239,       240,       241,       242,       243,       244
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*NSET, NSET=BC
         3,       241
*NSET, NSET=HM_auto_transform_3
         3,       241
*STEP
*END STEP
*****
